w
0.0
0 0 0
0.900000 0.499639 1.820000
0.14544 0 0
0.0
SURFACE
Wing
8 1.0 24 1.0
YDUPLICATE
0.0
TRANSLATE
0.00000 0.0 0.22750
SECTION
0.00000 0.00000 0.0 0.29089 0.0
SECTION
0.02182 0.91000 0.0 0.20362 0.0
SURFACE
Wing2
8 1.0 24 1.0
YDUPLICATE
0.0
TRANSLATE
0.00000 0.0 -0.22750
SECTION
0.00000 0.00000 0.0 0.29089 0.0
SECTION
0.02182 0.91000 0.0 0.20362 0.0
SURFACE
Plate
6 1.0 6 1.0
YDUPLICATE
0.0
SECTION
0.02182 0.91000 -0.22750 0.20362 0.0
SECTION
0.02182 0.91000 0.22750 0.20362 0.0
