w
0.0
0 0 0
1.100000 0.610670 1.820000
0.17776 0 0
0.0
SURFACE
Wing
10 1.0 28 1.0
YDUPLICATE
0.0
TRANSLATE
0.00000 0.0 0.00000
SECTION
0.00000 0.00000 0.0 0.71105 0.0
SECTION
0.05333 0.91000 0.0 0.49774 0.0
SURFACE
WL
10 1.0 12 1.0
YDUPLICATE
0.0
SECTION
0.13421 0.91000 -0.13650 0.17421 3.000
SECTION
0.11555 0.91000 0.00000 0.24887 3.000
SECTION
0.13421 0.91000 0.27300 0.17421 3.000
