DB-02 variant S1.00_slotted
0.0
0 0 0.0
1.0000 0.5552 1.8200
0.3618 0.0 0.0
0.030
SURFACE
Wing
10 1.0 26 -1.1
YDUPLICATE
0.0
ANGLE
2.0
SECTION
0.2230 0.0 0.1775 0.6464 0.0
AFILE
C:\Users\Nitro\Documents\GitHub\AIAA_DBF\DB-02_aircraft_variants\src\geometry\airfoils\sd7037.dat
SECTION
0.2715 0.9100 0.2093 0.4525 -2.00
AFILE
C:\Users\Nitro\Documents\GitHub\AIAA_DBF\DB-02_aircraft_variants\src\geometry\airfoils\sd7037.dat
SURFACE
Htail
8 1.0 12 1.0
YDUPLICATE
0.0
SECTION
1.3429 0.0 0.0600 0.3173 0.0
NACA
0009
SECTION
1.3667 0.5394 0.0600 0.2221 0.0
NACA
0009
SURFACE
Fin
8 1.0 10 1.0
SECTION
1.3438 0.0 0.0600 0.2688 0.0
NACA
0009
SECTION
1.3815 0.0 0.3826 0.1613 0.0
NACA
0009
